####################################################################################################
#
# MPM-Simulation of a Hyper Velocity Impact (HVI)
# A stationary plate is modelled as elastic/perfectly plastic with MPM.
# A sphere of the same material is modelled also with MPM.
# Contact between both solid bodies is handeled via a Hertzian repulsive potential.
#
# Note that MPM material model & parameters are defined in file "materials.ini"
#
# Note that the Hertzian contact is frictioneless.
#
# Unit sytem: mm, ms, GPa
# (you can use any _consistent_ unit system)
#
#
####################################################################################################


####################################################################################################
# MATERIAL PARAMETERS
####################################################################################################
variable 	rho equal 2.7E-06		# initial mass density
variable	K equal 57.4			# stiffness for Peridynamic material model
variable	contact_stiffness equal 1*${K}	# Contact stiffness between iPMB and MPM particles
variable	smax equal 0.15			# brittle failure strain for iPMB -- very large so effectively deactivated
variable	syield equal 10.0 		# plastic yield strain for iPMB -- very large so effectively deactivated
variable	G0 equal -1.0 			# energy release rate based failure criterion for iPMB. Deactived if < 0
variable	visc equal 0.1 			# artificial viscosity for iPMB

####################################################################################################
# INITIALIZE LAMMPS
####################################################################################################
dimension   	3
units	    	si
boundary    	f f f						# simulation box boundaries
atom_style  	smd
atom_modify 	map array
comm_modify 	vel yes 					# mandatory for SMD
comm_style  	tiled
neigh_modify	every 1 delay 0 check yes exclude type 1 1
newton      	off 						# mandatory for SMD
processors	* 2 3 file procs_grid.txt

####################################################################################################
# CREATE INITIAL GEOMETRY
####################################################################################################
variable 	l0 equal 0.030 # lattice spacing for creating particles

lattice 	sc ${l0}
region		box block  -10 +25  -8 +8  -8 +8  units box
create_box 	2 box

region		target-plate block  0.3 +1.3  -3 +3  -3 +3  units box	# plate of MPM particles
create_atoms 	1 region target-plate
group		target-plate type 1

region		projectile sphere  0.0  0.0  0.0  0.15  units box	# sphere of MPM particles
create_atoms 	2 region projectile
group		projectile type 2

####################################################################################################
# DISCRETIZATION PARAMETERS
####################################################################################################
variable	vol_one		equal ${l0}^3 # volume of one particle -- assuming sc lattice
variable	skin		equal 1.0*${l0} # Verlet list range
variable	mpm_cellsize	equal ${l0}
variable	contact_scale	equal 1.0 # scale factor for contact radius for Hertzian interaction between peri and MPM particles
variable	cr		equal ${l0}/2 # "contact" radius used by Hertzian potential

neighbor	${skin} bin
set     	group all smd_contact_radius ${cr}
set 		group all volume ${vol_one}
set     	group all smd_mass_density ${rho}
set     	group all smd_heat 0.0
set 		group all diameter ${cr} # MPM particles make no use of kernel radius

####################################################################################################
# DEFINE BOUNDARY CONDITIONS
####################################################################################################
velocity	projectile set  5000.0  0.0  0.0  units box

####################################################################################################
# INTERACTION PHYSICS / MATERIAL MODEL
####################################################################################################
pair_style	hybrid/overlay	smd/hertz ${contact_scale} &
				smd/mpm_linear ${mpm_cellsize} FLIP 0.999
# note that mpm pair style must be listed at last position if multiple pair styles are used
pair_coeff	1 1 smd/mpm_linear
pair_coeff	2 2 smd/mpm_linear
pair_coeff	1 2 smd/hertz ${contact_stiffness}

####################################################################################################
# TIME INTEGRATION
####################################################################################################
fix		dtfix all smd/adjust_dt 0.5 # dynamically adjust time increment every step

####################################################################################################
# SPECIFY TRAJECTORY OUTPUT
####################################################################################################
variable	dumpFreq	equal 100
variable	thermoFreq	equal ${dumpFreq}/10

compute		P all smd/plastic_strain
compute		contact_radius all smd/contact_radius
compute		S all smd/stress			# S[7] is von Mises stress
compute		smd_energy all smd/energy		# elastic continuum energy
variable	eela atom c_smd_energy[1]
variable	heat atom c_smd_energy[2]
variable	temp atom c_smd_energy[3]

dump 		dump_id all custom ${dumpFreq} f*.dump id type x y z vx vy vz proc c_P c_S[7] v_eela
dump_modify 	dump_id first yes pad 7

####################################################################################################
# STATUS OUTPUT
####################################################################################################
compute		alleint all reduce sum v_eela
variable	etot equal pe+ke+c_alleint # total energy of the system

compute		total_heat all reduce sum v_heat
thermo		${thermoFreq}
thermo_style	custom step dt time pe ke c_alleint v_etot
thermo_modify	lost warn

####################################################################################################
# RUN SIMULATION
####################################################################################################

balance		1.1 rcb # initial and continous load balancing
fix		lance_fix all balance 2000 1.1 rcb out tmp.balance

smd_run_duration	0.005	# run duration in physical time
run			1000000	# run for a large number of timesteps. Exits if run duration is exceeded.
